units lj
atom_style    full
dimension     3

pair_style lj/cut/coul/cut 2.5 10.0
bond_style fene
special_bonds lj 0.0 1.0 1.0 coul 1.0 1.0 1.0 # taken from Nayan's coacervate paper

read_data start/Substrates.data
change_box all boundary p p f

include ${SETTINGS_FILE}

####################################
#### GROUPS
####################################
variable subReg equal 1.4 # value was manually tested

variable topSubstrate equal zhi-${subReg}
variable bottomSubstrate equal zlo+${subReg}
region topsubstrate plane 0 0 ${topSubstrate} 0 0 1
region bottomsubstrate plane 0 0 ${bottomSubstrate} 0 0 -1

group top_sub region topsubstrate
group bot_sub region bottomsubstrate
group mobile subtract all top_sub

####################################
#### SETTING UP INITIAL PARAMETERS
####################################
velocity chains create ${Temp} ${velSeed}
fix stabilize all momentum 1 linear 1 1 1
fix nvt1 mobile nvt temp ${Temp} ${Temp} ${Tdamping}

# determine density of coacervate slab
variable n_polymer_beads equal count(chains)
variable x_bounds equal bound(chains,x)
variable y_bounds equal bound(chains,y)
variable z_bounds equal bound(chains,z)

variable slabVol equal abs(v_xbounds[2]-v_xbounds[1])*abs(v_ybounds[2]-v_ybounds[1])*abs(v_zbounds[2]-v_zbounds[1])
variable slabDensity equal ${n_polymer_beads}/v_slabVol
####################################
#### MOVE TOP SUBSTRATE TOWARDS MELT
####################################

fix tether subs spring/self 100.0
fix_modify tether energy yes

fix topcompress top_sub move linear NULL NULL -${rate}
fix checkPress all halt 100 v_slabDensity < 0.8 error soft

dump dumpCompress all custom 100 lmp_trj/Compress.dat id type mol xu yu zu c_potEng c_voronoi[1] c_stressA[1] c_stressA[2] c_stressA[3] c_stressA[4] c_stressA[5] c_stressA[6]
dump_modify dumpCompress sort id

reset_timestep 0
run ${max_steps2} upto
unfix topcompress
unfix checkPress
undump dumpCompress

write_data lmp_data/Compressed.data
write_restart lmp_bin/Compressed.bin
